// SBML level 2 version 4

model ModelIV()
  // p53 model IV

  // Compartments:
  compartment cell = 1;

  // Species:
  species X in cell = 0; X is "p53";
  species Y0 in cell = 0.1/cell; Y0 is "Mdm2 precursor";
  species Y in cell = 0.8/cell; Y is "Mdm2";

  // Parameters:
  betaY = 1.2;
  alpha0 = 0.9;
  alphaY = 0.8;
  betaX = 0.9;
  alphaX = 0.3;
  alphaK = 1.7;
  k = 0.0001;
  omega = 200;

  // Reactions:
  Xgen: => X; betaX*omega; Xgen is "p53 generation";
  XDeg: X => ; alphaX*X; XDeg is "p53 degradation";
  XMdm2Deg: X => ; alphaK*X*Y/(X + k*omega); XMdm2Deg is "p53 degradation - Mdm2 dependent";
  Y0gen: => Y0; betaY*X; Y0gen is "Mdm2 precursor generation";
  Y0mat: Y0 => Y; alpha0*Y0; Y0mat is "Mdm2 precursor maturation";
  Ydeg: Y => ; alphaY*Y; Ydeg is "Mdm2 degradation";

  // Unit definitions:
  unit substance = item;
end
