// SBML level 2 version 2

model Hasty()
  // Model from a *A synchronized quorum of genetic clocks*

  // Compartments:
  compartment cell = 1;
  compartment environment = 1;

  // Species:
  species A in cell = 1000/cell;
  species I in cell = 100/cell;
  species Hi in cell = 0;
  species He in environment = 0;

  // Parameters:
  tau = 10;
  k1 = 0.1;
  C_A = 1;
  C_I = 4;
  d_0 = 0.88;
  gamma_A = 15;
  gamma_I = 24;
  gamma_H = 0.01;
  f = 0.3;
  b = 0.06;
  k = 1;
  g = 0.01;
  d = 0.5;
  delta = 0.001;
  alpha = 2500;
  D = 2.5;
  mu = 0.5;

  // Reactions:
  AiiA_synthesis: => A; cell*C_A*(1 - (d/d_0)^4)*(delta + alpha*delay(Hi, tau)^2)/(1 + k1*delay(Hi, tau)^2);
  LuxI_synthesis: => I; cell*C_I*(1 - (d/d_0)^4)*(delta + alpha*delay(Hi, tau)^2)/(1 + k1*delay(Hi, tau)^2);
  AiiA_degradation: A => ; cell*gamma_A*A/(1 + f*(A + I));
  LuxI_degradation: I => ; cell*gamma_I*I/(1 + f*(A + I));
  AHL_synthesis: => Hi; cell*b*I/(1 + k*I);
  AHL_enzymatic_degradation: Hi => ; cell*gamma_H*A*Hi/(1 + g*A);
  AHL_degradation: He => ; environment*mu*He;
  AHL_diffusion1: Hi => He; cell*D*Hi;
  AHL_diffusion2: He => Hi; cell*D*He;
end
